<?xml version="1.0"?>
<!-- Generated by Aero-Matic v 1

     Inputs:
                horsepower: 2200.0
                     pitch: variable
            max engine rpm: 3700
        prop diameter (ft): 10

     Outputs:
              max prop rpm: 1876.30
                gear ratio:    1.97
                       Cp0: 0.166387
                       Ct0: 0.387683
       static thrust (lbs): 9015.51
-->

<propeller name="prop">
  <ixx>45.5282 </ixx>
  <diameter unit="IN">120.0 </diameter>
  <numblades> 3 </numblades>
  <gearratio>1.97 </gearratio>
  <minpitch> 12 </minpitch>
  <maxpitch> 45 </maxpitch>
  <minrpm>   1500 </minrpm>
  <maxrpm>   1820 </maxrpm>
  <sense>   -1.0 </sense>
  <p_factor> 4.0 </p_factor>

  <table name="C_THRUST" type="internal">
      <tableData>
                -10         0       15       25       35       45       55       65       90
      -0.2      -0.1892   0.1066   0.3877   0.4749   0.5234   0.5524   0.5090   0.4361   0.0000
       0.0      -0.2811   0.0000   0.3877   0.4749   0.5234   0.5575   0.5210   0.4361   0.0000
       0.2      -0.3152   -0.0969   0.3346   0.4652   0.5160   0.5575   0.5210   0.4361   0.0000
       0.4      -0.3152   -0.2252   0.2520   0.4606   0.5063   0.5524   0.5210   0.4361   0.0000
       0.6      -0.3152   -0.3152   0.1334   0.4144   0.4846   0.5381   0.5137   0.4361   0.0000
       0.8      -0.3152   -0.3152   0.0074   0.3101   0.4703   0.5187   0.5137   0.4361   0.0000
       1.0      -0.3152   -0.3152   -0.1260   0.1892   0.4509   0.4920   0.5090   0.4361   0.0000
       1.2      -0.3152   -0.3152   -0.2594   0.0582   0.3706   0.4749   0.5090   0.4361   0.0000
       1.4      -0.3152   -0.3152   -0.3152   -0.0849   0.2667   0.4675   0.4993   0.4361   0.0000
       1.6      -0.3152   -0.3152   -0.3152   -0.2156   0.1454   0.4509   0.4896   0.4361   0.0000
       1.8      -0.3152   -0.3152   -0.3152   -0.3152   0.0244   0.3877   0.4749   0.4361   0.0000
       2.0      -0.3152   -0.3152   -0.3152   -0.3152   -0.0969   0.3028   0.4730   0.4361   0.0000
       2.2      -0.3152   -0.3152   -0.3152   -0.3152   -0.2183   0.2183   0.4652   0.4361   0.0000
       2.4      -0.3152   -0.3152   -0.3152   -0.3152   -0.3152   0.1163   0.3799   0.4361   0.0000
       2.6      -0.3152   -0.3152   -0.3152   -0.3152   -0.3152   0.0147   0.2404   0.3877   0.0000
       2.8      -0.3152   -0.3152   -0.3152   -0.3152   -0.3152   -0.0872   0.1574   0.3152   0.0000
       3.0      -0.3152   -0.3152   -0.3152   -0.3152   -0.3152   -0.1892   0.0826   0.2423   0.0000
       3.2      -0.3152   -0.3152   -0.3152   -0.3152   -0.3152   -0.2908   0.0074   0.1698   0.0000
       3.4      -0.3152   -0.3152   -0.3152   -0.3152   -0.3152   -0.3152   -0.0678   0.0969   0.0000
       3.6      -0.3152   -0.3152   -0.3152   -0.3152   -0.3152   -0.3152   -0.1431   0.0244   0.0000
       3.8      -0.3152   -0.3152   -0.3152   -0.3152   -0.3152   -0.3152   -0.2183   -0.0485   0.0000
       4.0      -0.3152   -0.3152   -0.3152   -0.3152   -0.3152   -0.3152   -0.2931   -0.1213   0.0000
       6.0      -0.3152   -0.3152   -0.3152   -0.3152   -0.3152   -0.3152   -0.3152   -0.3152   0.0000
      </tableData>
  </table>

  <table name="C_POWER" type="internal">
     <tableData>
               -10        0       15       25       35       45       55        65        90
      -0.2      0.0278   0.0554   0.1942   0.4409   0.7604   1.0815   1.2479   1.3810   1.3810
       0.0      0.1110   0.0278   0.1664   0.4110   0.7271   1.0815   1.2529   1.3810   1.3810
       0.2      0.1581   0.0444   0.1609   0.3827   0.6955   1.0815   1.2529   1.3810   1.3810
       0.4      0.2130   0.0970   0.1386   0.3527   0.6606   1.0815   1.2529   1.3810   1.3810
       0.6      0.2612   0.1469   0.0915   0.3278   0.6190   1.0599   1.2479   1.3810   1.3810
       0.8      0.3078   0.1968   0.0278   0.2779   0.5824   1.0116   1.2479   1.3810   1.3810
       1.0      0.3544   0.2446   0.0278   0.1947   0.5491   0.9601   1.2429   1.3810   1.3810
       1.2      0.4027   0.1955   -0.0915   0.0749   0.4859   0.9201   1.2346   1.3810   1.3810
       1.4      0.4492   0.3378   -0.1381   -0.0554   0.3744   0.9068   1.2196   1.3810   1.3810
       1.6      0.4958   0.3860   -0.1614   -0.1664   0.2363   0.8819   1.1930   1.3311   1.3810
       1.8      0.5441   0.4326   -0.1664   -0.2779   0.0694   0.7820   1.1564   1.3028   1.3810
       2.0      0.5907   0.4792   -0.2130   -0.3877   -0.0832   0.6655   1.1015   1.2762   1.3810
       2.2      0.6373   0.5274   -0.2612   -0.4992   -0.2496   0.5408   1.0682   1.2196   1.3810
       2.4      0.6855   0.5740   -0.3078   -0.6106   -0.4160   0.3860   1.0366   1.1930   1.3810
       2.6      0.7321   0.6206   -0.3544   -0.7205   -0.5274   0.1614   1.0116   1.1514   1.3810
       2.8      0.7787   0.6689   -0.4027   -0.8319   -0.6323   -0.0549   0.9900   1.1364   1.3810
       3.0      0.8269   0.7155   -0.4492   -0.9434   -0.7487   -0.2496   0.9567   1.1364   1.3810
       3.2      0.8735   0.7621   -0.4958   -1.0532   -0.8602   -0.4443   0.8952   1.1098   1.3810
       3.4      0.9201   0.8103   -0.5441   -1.1647   -0.9700   -0.6373   0.6938   1.0815   1.3810
       3.6      0.9684   0.8569   -0.5907   -1.2762   -1.0815   -0.8319   0.4875   1.0532   1.3810
       3.8      1.0150   0.9035   -0.6373   -1.3810   -1.1930   -1.0266   0.2712   1.0200   1.3810
       4.0      1.0616   0.9517   -0.6855   -1.3810   -1.3810   -1.2196   0.0549   0.9434   1.3810
       6.0      1.3810   1.3810   -1.3810   -1.3810   -1.3810   -1.3810   -1.3810   -0.8319   1.3810
     </tableData>
  </table>

</propeller>
